units           real
atom_style      full

pair_style      lj/cut/coul/long 12.000
bond_style      harmonic
angle_style     harmonic
dihedral_style  opls
improper_style  cvff

dielectric      1.0
pair_modify     mix arithmetic
special_bonds   lj/coul 0.0 0.0 1.0
#box tilt        large
read_data       data.lammps

set		type 1 charge -0.55
set		type 2 charge 1.1

group		zeo type 1 2
group		indole type 3 4 5 6 7 8 9 10 11 12 13 14 15 16 17 18

kspace_style    pppm 1.0e-4

#group		rigid union JUC gra1 gra2
#group		frozen union JUC gra1 gra2

neighbor	2.0 bin
neigh_modify	delay 5 exclude molecule/intra zeo
#neigh_modify	every 5 delay 10

timestep        1.0

#fix     	11 frozen setforce 0.0 0.0 0.0

delete_bonds	zeo multi

velocity        indole create 700.0 902144 dist gaussian
velocity	zeo set 0.0 0.0 0.0

#fix		20 water shake 0.0001 20 0 t 6 7
#fix     	1 sol npt temp 298.0 298.0 100.0 iso 1.0 1.0 1000.0
fix		1 indole nvt temp 700.0 700.0 100.0

#fix		21 sol wall/harmonic xlo 15.0 10.0 0.0 2.0 units box

compute         1 indole temp

thermo		500
thermo_style	custom step time spcpu c_1 press pe ke enthalpy evdwl emol ecoul etotal

compute         m_s_d1 indole msd

variable        MSD1x equal c_m_s_d1[1]
variable        MSD1y equal c_m_s_d1[2]
variable        MSD1z equal c_m_s_d1[3]
variable        MSD1 equal c_m_s_d1[4]

fix             6 all print 1000 "${MSD1x} ${MSD1y} ${MSD1z} ${MSD1}" file ./msd-indole.dat screen no title "#MSD-ROD"

dump            1 all xyz 10000000 snapshot_*.xyz
dump_modify	1 element O Si H C C C H N H C C H C H C H C H
dump            2 all dcd 1000 traj.dcd
dump		3 indole xtc 1000 indo.xtc

restart         10000000 restart.*.run
run		100000000 upto
