units           real
atom_style      full

pair_style      lj/cut/coul/long 12.000
bond_style      harmonic
angle_style     harmonic
dihedral_style  opls
improper_style  cvff

dielectric      1.0
pair_modify     mix arithmetic
special_bonds   lj/coul 0.0 0.0 1.0
#box tilt        large
read_data       single_indole.data

group		zeo type 1 2
group		indole type 3 4 5 6 7 8 9 10 11 12 13 14 15 16 17 18

kspace_style    pppm 1.0e-4


neighbor	2.0 bin
neigh_modify	delay 5 exclude molecule/intra zeo

timestep        1.0

velocity        indole create 700.0 902144 dist gaussian


fix		1 indole nvt temp 700.0 700.0 100.0


compute         1 indole temp

thermo		1000

thermo_style    custom step time spcpu c_1 temp press pe ke enthalpy evdwl ecoul epair ebond eangle edihed elong etail emol ecouple econserve etotal

dump nvt_dump all yaml 1000 eq.yaml id type x y z
dump_modify nvt_dump sort id units yes thermo yes

dump nvt_xyz all xyz 1000 eq.xyz
dump_modify nvt_xyz sort id units yes

run		100000

write_data nvt_1ns_indole.data pair ij
